# Polyamide_Count_Mode_Basic_100k_400K Pre-Equilibration Script - Generated 2026-09-23 16:20:07 by AutoREACTER

#------------Initialization------------
units            real
dimension        3
boundary         p p p
atom_style       full

#------------Force Field Styles------------
bond_style       class2
angle_style      class2
dihedral_style   class2
improper_style   class2

pair_style       lj/class2/coul/long 12.0
kspace_style     pppm 1.0e-4
pair_modify      mix sixthpower
neighbor         2.0 bin
neigh_modify     delay 0 every 1 check yes one 5000 page 100000

#------------Read Densified Configuration------------
# Reads the final configuration from the densification stage.
read_data        Polyamide_Count_Mode_Basic_100k_400K_shrinked_box.data &
                 extra/bond/per/atom 50 &
                 extra/angle/per/atom 50 &
                 extra/dihedral/per/atom 50 &
                 extra/improper/per/atom 50 &
                 extra/special/per/atom 50

#------------Simulation Setup------------
# Perform an initial energy minimization to remove bad contacts
minimize         0.0 1.0e-8 1000 100000
reset_timestep   0

# Use a 1 fs timestep for all stages of equilibration
timestep         1
thermo           1000
thermo_style     custom step time temp press density vol pe ke etotal

# Trajectory output (XYZ format with atom type labels)
dump             dump_2 all xyz 1000 Polyamide_Count_Mode_Basic_100k_400K_pre_equilibration.xyz
dump_modify      dump_2 types labels

# Automatic restart files every 100 steps
restart          100 Polyamide_Count_Mode_Basic_100k_400K_pre_equilibration_backup1.restart Polyamide_Count_Mode_Basic_100k_400K_pre_equilibration_backup2.restart

#------------Stage 1: NVT Temperature Ramp------------
# (25,000 steps × 1 fs timestep)
fix              nvt_1 all nvt temp 298.15 400.0 100.0
run              50000
unfix            nvt_1

#------------Stage 2: Final NVT Equilibration------------
# Extended constant-volume equilibration at the final temperature.
# This stabilizes the system after the density adjustment in the NPT stage.
fix              nvt_3 all nvt temp 400.0 400.0 100.0
run              50000
unfix            nvt_3

#------------Cleanup and Output------------
undump           dump_2
write_data       Polyamide_Count_Mode_Basic_100k_400K_pre_equilibrated.data
